Simulations: Version=160
  DataStore
  Simulation Default
    Clock: Start=1990-01-01; End=2018-12-31
    Summary summaryfile
    Weather: FileName=C:\Users\Makan\Desktop\food_security\107.9_10.92.met
    SoilArbitrator Soil Arbitrator
    Zone paddock: Area=1; Slope=0; AspectAngle=0; Altitude=50
      Report HarvestReport: EventNames=[Soybean].Harvesting
        VariableNames:
          [Clock].Today
          [Soybean].Phenology.Stage
          [Soybean].Phenology.CurrentStageName
          [Soybean].AboveGround.Wt
          [Soybean].AboveGround.N
          [Soybean].Grain.Total.Wt*10 as Yield
          [Soybean].Grain.NConc
          [Soybean].Grain.Size
          [Soybean].Grain.Number
          [Soybean].Grain.Total.Wt
          [Soybean].Grain.Total.N
          [Soybean].Total.Wt
      Fertiliser
      Soil SoilType =  clay loam: SoilType=SoilType =  clay loam; Country=Việt Nam; ApsoilNumber=0; Latitude=10.92; Longitude=107.9
        DataSource=Original source is www.isric.org. See: https://www.isric.org/explore/soilgrids/faq-soilgrids  2023-05-23 19:39:23.292481
        Comments=resolution = 250m - taxonomic classification name = clay loam - drainage class = NA - elevation = NA - slope = NA - geomdesc = NA
        Physical
          Thickness  ParticleSizeClay  ParticleSizeSand  ParticleSizeSilt  BD    AirDry     LL15      DUL       SAT       KS
          50         32.4              35.9              31.7              1.34  0.0974829  0.194966  0.32371   0.423111  257.584
          100        33.4              35.8              30.8              1.38  0.200643   0.200643  0.329001  0.425348  233.747
          150        36.3              34                29.7              1.41  0.217413   0.217413  0.346596  0.434327  175.448
          300        37.2              33.9              28.9              1.42  0.222639   0.222639  0.351428  0.43672   160.747
          400        37.6              33.3              29.1              1.42  0.224835   0.224835  0.354225  0.438373  154.421
          1000       34.4              34.1              31.5              1.43  0.206186   0.206186  0.336525  0.429282  209.002
          SoilCrop MaizeSoil
            LL=[0.194966, 0.200643, 0.217413, 0.222639, 0.224835, 0.206186]
            KL=[0.06, 0.0491238, 0.0402192, 0.0329287, 0.0269597, 0.0220728]
            XF=[1, 1, 1, 1, 1, 1]
          SoilCrop SoybeanSoil
            LL=[0.194966, 0.200643, 0.217413, 0.222639, 0.224835, 0.206186]
            KL=[0.06, 0.0491238, 0.0402192, 0.0329287, 0.0269597, 0.0220728]
            XF=[1, 1, 1, 1, 1, 1]
          SoilCrop WheatSoil
            LL=[0.194966, 0.200643, 0.217413, 0.222639, 0.224835, 0.206186]
            KL=[0.06, 0.0491238, 0.0402192, 0.0329287, 0.0269597, 0.0220728]
            XF=[1, 1, 1, 1, 1, 1]
        WaterBalance SoilWater: SummerDate=1-Nov; SummerU=5; SummerCona=5; WinterDate=1-Apr; WinterU=5; WinterCona=5; DiffusConst=40; DiffusSlope=16; Salb=0.13; CN2Bare=73; CNRed=20; CNCov=0.8; PSIDul=-100; Thickness=[50, 100, 150, 300, 400, 1000]; SWCON=[0.4, 0.4, 0.4, 0.4, 0.4, 0.4]
        Organic: FOMCNRatio=40; CarbonUnits=Total
          Thickness  Carbon  SoilCNRatio  FBiom      FInert    FOM
          50         2.02    12           0.04       0.8       150
          100        1.44    12           0.0327492  0.80804   122.81
          150        0.98    12           0.0268128  0.816161  100.548
          300        0.95    12           0.0219525  0.824364  82.3217
          400        0.53    12           0.0179732  0.832649  67.3993
          1000       0.36    12           0.0147152  0.841017  55.1819
        Chemical: Thickness=[50, 100, 150, 300, 400, 1000]; PH=[6, 6.1, 6.1, 6.1, 6.2, 6.3]; PHUnits=Water
        Water: Thickness=[150, 150, 300, 300, 300, 300, 300]; InitialValues=[0.42, 0.42, 0.42, 0.42, 0.42, 0.42, 0.42]; InitialPAWmm=371.901; RelativeTo=LL15; FilledFromTop=false
        CERESSoilTemperature Temperature
        Nutrient
        Solute NO3: Thickness=[150, 150, 300, 300, 300, 300, 300]; InitialValues=[1, 1, 1, 1, 1, 1, 1]; InitialValuesUnits=ppm; WaterTableConcentration=0; D0=0; DepthConstant=0; MaxDepthSoluteAccessible=0; RunoffEffectivenessAtMovingSolute=0; MaxEffectiveRunoff=0
        Solute NH4: Thickness=[150, 150, 300, 300, 300, 300, 300]; InitialValues=[0.1, 0.1, 0.1, 0.1, 0.1, 0.1, 0.1]; InitialValuesUnits=ppm; WaterTableConcentration=0; D0=0; DepthConstant=0; MaxDepthSoluteAccessible=0; RunoffEffectivenessAtMovingSolute=0; MaxEffectiveRunoff=0
        Solute Urea: Thickness=[150, 150, 300, 300, 300, 300, 300]; InitialValues=[0, 0, 0, 0, 0, 0, 0]; InitialValuesUnits=kg/ha; WaterTableConcentration=0; D0=0; DepthConstant=0; MaxDepthSoluteAccessible=0; RunoffEffectivenessAtMovingSolute=0; MaxEffectiveRunoff=0
      SurfaceOrganicMatter: InitialResidueName=maize; InitialResidueType=maize; InitialResidueMass=100; InitialStandingFraction=0; InitialCPR=0; InitialCNR=55
      Plant Soybean
      MicroClimate: a_interception=0; b_interception=1; c_interception=0; d_interception=0; SoilHeatFluxFraction=0.4; MinimumHeightDiffForNewLayer=0; NightInterceptionFraction=0.5; ReferenceHeight=2
      Manager SowingFertiliser
        Amount = 10
        CropName = soybean
```csharp
using Models.Soils;
using System.Linq;
using System;
using Models.Core;
using Models.PMF;
namespace Models
{
    [Serializable]
    public class Script : Model
    {
        [Link] Clock Clock;
        [Link] Fertiliser Fertiliser;
        [Link] Summary Summary;
        
        
        [Description("Amount of fertiliser to be applied (kg/ha)")]
        public double Amount { get; set;}
        
        [Description("Crop to be fertilised")]
        public string CropName { get; set;}
        
        
        

        [EventSubscribe("Sowing")]
        private void OnSowing(object sender, EventArgs e)
        {
            Model crop = sender as Model;
            if (crop.Name.ToLower()==CropName.ToLower())
                Fertiliser.Apply(Amount: Amount, Type: Fertiliser.Types.NO3N);
        }
        
    }
}
```
      Manager Harvesting
```csharp
using Models.PMF.Phen;
using APSIM.Shared.Utilities;
using System.Xml.Serialization;
using Models;
using Models.PMF;
using Models.Soils;
using System.Text;
using System.Collections.Generic;
using Models.Core;
using System;
using System.Linq;
using Models.Soils.Nutrients;

namespace Models
{
    [Serializable] 
    public class Script : Model
    {
        [Link] private Plant Soybean;
        [Link] private Zone zone;
        [Link(Type = LinkType.Path, Path = "[Soybean].Phenology")]
        private Phenology phenology;
                    
        
        [EventSubscribe("StartOfSimulation")]
        private void OnSimulationCommencing(object sender, EventArgs e)
        {
        }
        
        [EventSubscribe("DoManagement")]
        private void OnDoManagement(object sender, EventArgs e)
        {
            if (phenology.CurrentPhase.Name == "ReadyForHarvesting")
            {
                Soybean.Harvest();
                Soybean.EndCrop();
            }
        }
        
        [EventSubscribe("DoManagementCalculations")]
        private void OnDoManagementCalculations(object sender, EventArgs e)
        {
            
        }
    }
}
```
      Manager SowingRule
        StartDate = 1-sep
        EndDate = 1-dec
        MinESW = 100
        MinRain = 25
        RainDays = 7
        CultivarName = Davis
        SowingDepth = 50
        RowSpacing = 750
        Population = 38
```csharp
using Models.Interfaces;
using System;
using System.Linq;
using Models.Core;
using Models.PMF;
using Models.Soils;
using Models.Soils.Nutrients;
using Models.Utilities;
using APSIM.Shared.Utilities;
using Models.Climate;

namespace Models
{
    [Serializable]
    public class Script : Model
    {
        [Link] private Clock Clock;
        [Link] private Fertiliser Fertiliser;
        [Link] private Summary Summary;
        [Link] private Plant Soybean;
        [Link] private Soil Soil;
        private Accumulator accumulatedRain;
        [Link]
        private ISoilWater waterBalance;
        
        [Description("Start of sowing window (d-mmm)")]
        public string StartDate { get; set; }
        [Description("End of sowing window (d-mmm)")]
        public string EndDate { get; set; }
        [Description("Minimum extractable soil water for sowing (mm)")]
        public double MinESW { get; set; }
        [Description("Accumulated rainfall required for sowing (mm)")]
        public double MinRain { get; set; }
        [Description("Duration of rainfall accumulation (d)")]
        public int RainDays { get; set; }
        [Description("Cultivar to be sown")]
        [Display(Type=DisplayType.CultivarName, PlantName = "Soybean")]
        public string CultivarName { get; set; }
        [Description("Sowing depth (mm)")]
        public double SowingDepth { get; set; }
        [Description("Row spacing (mm)")]
        public double RowSpacing { get; set; }
        [Description("Plant population (/m2)")]
        public double Population { get; set; }
        
        
        [EventSubscribe("StartOfSimulation")]
        private void OnSimulationCommencing(object sender, EventArgs e)
        {
            accumulatedRain = new Accumulator(this, "[Weather].Rain", RainDays);
        }
        

        [EventSubscribe("DoManagement")]
        private void OnDoManagement(object sender, EventArgs e)
        {
            accumulatedRain.Update();
            
            if (DateUtilities.WithinDates(StartDate, Clock.Today, EndDate) &&
                !Soybean.IsAlive &&
                MathUtilities.Sum(waterBalance.ESW) > MinESW &&
                accumulatedRain.Sum > MinRain)
            {
                Soybean.Sow(population: Population, cultivar: CultivarName, depth: SowingDepth, rowSpacing: RowSpacing);    
            }
        
        }
        
    }
}
```
  Simulation DoubleRain
    Clock: Start=1990-01-01; End=2018-12-31
    Summary summaryfile
    Weather: FileName=C:\Users\Makan\Desktop\food_security\107.9_10.92.met
    SoilArbitrator Soil Arbitrator
    Zone paddock: same as Default.paddock
    Manager ClimateController
      AllowControl = True
      EnableDate = 01/01/1990 00:00:00
      WithinYearControl = False
      ControlStart = 01-jan
      ControlEnd = 31-dec
      RainfallMultiplier = 2
      RainfallAddition = 0
      RadiationMultiplier = 1
      RadiationAddition = 0
      MinTMultiplier = 1
      MinTAddition = 0
      MaxTMultiplier = 1
      MaxTAddition = 0
      WindMultiplier = 1
      WindAddition = 0
      VPMultiplier = 1
      VPAddition = 0
```csharp
using Newtonsoft.Json;
using System.Linq;
using System;
using System.Xml.Serialization;
using Models.Core;
using Models.PMF;
using Models.Soils;
using Models.Soils.Nutrients;
using APSIM.Shared.Utilities;
using Models.Climate;

namespace Models
{
    [Serializable]
    public class Script : Model
    {
        // - Links to APSIM models
        [Link] Zone zone;
        [Link] Clock clock;
        [Link] Weather weather;
        [Link] ISummary summary = null;

        // - Paramters for this manager
        [Description("Enable? Set to 'No' to completely disable this manager")] public bool AllowControl { get; set; }

        [Separator("General settings")]
        [Description("Start the climate controls beginning on date (dd/mmm/yyyy): ")] public DateTime EnableDate { get; set; }
        [Description("Implement climate control only during part of the year?")] public bool WithinYearControl { get; set; }
        [Description("Within each year, the first day to start the climate controls is (dd-mmm)")] public string ControlStart { get; set; }
        [Description("Within each year, end last day of climate control is (dd-mmm)")] public string ControlEnd { get; set; }

        [Separator("Rainfall")]
        [Description("Rainfall multiplier (-): ")] public double RainfallMultiplier { get; set; }
        [Description("Rainfall addition (mm): ")] public double RainfallAddition { get; set; }

        [Separator("Radiation")]
        [Description("Radiation multiplier (-): ")] public double RadiationMultiplier { get; set; }
        [Description("Radiation addition (MJ/m2): ")] public double RadiationAddition { get; set; }

        [Separator("Minimum temperature")]
        [Description("Minimum temperature multiplier (-): ")] public double MinTMultiplier { get; set; }
        [Description("Minimum temperature addition (C): ")] public double MinTAddition { get; set; }

        [Separator("Maximum temperature")]
        [Description("Maximum temperature multiplier (-): ")] public double MaxTMultiplier { get; set; }
        [Description("Maximum temperature addition (C): ")] public double MaxTAddition { get; set; }

        [Separator("Wind speed")]
        [Description("Wind speed multiplier (-): ")] public double WindMultiplier { get; set; }
        [Description("Wind speed addition (m/s): ")] public double WindAddition { get; set; }

        [Separator("Vapour pressure")]
        [Description("Vapour pressure multiplier (-): ")] public double VPMultiplier { get; set; }
        [Description("Vapour pressure addition (hPa): ")] public double VPAddition { get; set; }

        [JsonIgnore] public bool DoControl { get; set; }
        [JsonIgnore] public int DoControlInt { get; set; }

        [EventSubscribe("PreparingNewWeatherData")] private void OnDoManagement(object sender, EventArgs e)
        {
            // Check if this manager is enabled
            if ((AllowControl) && (clock.Today >= EnableDate))
            {
                DoControl = true;
                if (WithinYearControl)
                    DoControl = DateUtilities.WithinDates(ControlStart, clock.Today, ControlEnd); 
            }

            if (DoControl)
                DoControlInt = 1;
            else
                DoControlInt = 0;

            if (DoControl)
            {
                // do the weather alterations 
                weather.Rain = RainfallMultiplier * weather.Rain + RainfallAddition;
                weather.Radn = RadiationMultiplier * weather.Radn + RadiationAddition;
                weather.MinT = MinTMultiplier * weather.MinT + MinTAddition;
                weather.MaxT = MaxTMultiplier * weather.MaxT + MaxTAddition;
                weather.Wind = WindMultiplier * weather.Wind + WindAddition;
                weather.VP = VPMultiplier * weather.VP + VPAddition;
            }
        }
    }
}
```
  Simulation DoubleRaid
    Clock: Start=1990-01-01; End=2018-12-31
    Summary summaryfile
    Weather: FileName=C:\Users\Makan\Desktop\food_security\107.9_10.92.met
    SoilArbitrator Soil Arbitrator
    Zone paddock: same as Default.paddock
    Manager ClimateController
      AllowControl = True
      EnableDate = 01/01/1990 00:00:00
      WithinYearControl = False
      ControlStart = 01-jan
      ControlEnd = 31-dec
      RainfallMultiplier = 1
      RainfallAddition = 0
      RadiationMultiplier = 2
      RadiationAddition = 0
      MinTMultiplier = 1
      MinTAddition = 0
      MaxTMultiplier = 1
      MaxTAddition = 0
      WindMultiplier = 1
      WindAddition = 0
      VPMultiplier = 1
      VPAddition = 0
      script: same as in DoubleRain.ClimateController
  Simulation MinTempRCP8
    Clock: Start=1990-01-01; End=2018-12-31
    Summary summaryfile
    Weather: FileName=C:\Users\Makan\Desktop\food_security\107.9_10.92.met
    SoilArbitrator Soil Arbitrator
    Zone paddock: same as Default.paddock
    Manager ClimateController
      AllowControl = True
      EnableDate = 01/01/1990 00:00:00
      WithinYearControl = False
      ControlStart = 01-jan
      ControlEnd = 31-dec
      RainfallMultiplier = 1
      RainfallAddition = 0
      RadiationMultiplier = 1
      RadiationAddition = 0
      MinTMultiplier = 1
      MinTAddition = 4.3
      MaxTMultiplier = 1
      MaxTAddition = 0
      WindMultiplier = 1
      WindAddition = 0
      VPMultiplier = 1
      VPAddition = 0
      script: same as in DoubleRain.ClimateController
  Simulation MaxTempRCP8
    Clock: Start=1990-01-01; End=2018-12-31
    Summary summaryfile
    Weather: FileName=C:\Users\Makan\Desktop\food_security\107.9_10.92.met
    SoilArbitrator Soil Arbitrator
    Zone paddock: same as Default.paddock
    Manager ClimateController
      AllowControl = True
      EnableDate = 01/01/1990 00:00:00
      WithinYearControl = False
      ControlStart = 01-jan
      ControlEnd = 31-dec
      RainfallMultiplier = 1
      RainfallAddition = 0
      RadiationMultiplier = 1
      RadiationAddition = 0
      MinTMultiplier = 1
      MinTAddition = 0
      MaxTMultiplier = 1
      MaxTAddition = 4.3
      WindMultiplier = 1
      WindAddition = 0
      VPMultiplier = 1
      VPAddition = 0
      script: same as in DoubleRain.ClimateController
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